# created by fftool

units real
boundary p p p

atom_style full
bond_style harmonic
angle_style harmonic
dihedral_style opls

special_bonds lj/coul 0.0 0.0 0.5

# remove hybrid if not necessary
pair_style hybrid lj/cut/coul/long 12.0 12.0
pair_modify tail yes
kspace_style pppm 1.0e-5

read_data data.min.lmp

include pair.lmp

#minimize 1.0e-4 1.0e-6 100 1000

fix SHAKE all shake 0.0001 20 0 b 5 6 7 8 9 10 11 16 a 26
neighbor 2.0 bin
neigh_modify delay 0 every 1 check yes

timestep 0.5
thermo   100

thermo_style custom step cpu etotal ke pe evdwl ecoul elong temp press vol density lx
thermo_modify lost ignore
#thermo_modify line multi

dump d1 all custom 1000 system.heat.lammpstrj id type xu yu zu
fix f1 all nvt temp 10.0 300.0 100.0
run 500000
unfix f1
undump d1
write_data system.heat.data

dump d1 all custom 1000 dump.lammpstrj id mol type element q xu yu zu
dump_modify d1 element C N C C O H H H H H H H Li C F S N O H O
fix             f1 all npt temp 300.0 300.0 100 iso 1.0 1.0 1000
restart         1000000 data.npt.*.restart
run             5000000
unfix           f1
undump          d1

write_data data.npt.lmp
